<?xml version="1.0" encoding="ISO-8859-1"?>
<neuroml xmlns="http://www.neuroml.org/schema/neuroml2" xmlns:xsi="http://www.w3.org/2001/XMLSchema-instance" xsi:schemaLocation="http://www.neuroml.org/schema/neuroml2 https://raw.github.com/NeuroML/NeuroML2/development/Schemas/NeuroML2/NeuroML_v2beta4.xsd" id="Golgi_KC">

    <notes>ChannelML file containing a single T-type Ca++ channel description from Lawrence et al 2006</notes>

    <ionChannel id="ICaT" conductance="0.25pS" type="ionChannelHH" species="ca">

        <gateHHrates id="m" instances="2">
            <forwardRate type="HHExpLinearRate" rate="2per_ms" midpoint="19.26mV" scale="10mV"/>
            <reverseRate type="HHExpRate" rate="0.009per_ms" midpoint="0mV" scale="-22.03mV"/>
        </gateHHrates>

        <gateHHrates id="h" instances="1">
            <forwardRate type="HHExpRate" rate="1e-06per_ms" midpoint="0mV" scale="-16.26mV"/>
            <reverseRate type="HHSigmoidRate" rate="1per_ms" midpoint="29.79mV" scale="10mV"/>
        </gateHHrates>

    </ionChannel>

</neuroml>
